# Goodman's failure criteria
K_fs := 1.37
M_a := 1260 in*lbf
M_m := 0 in*lbf
S_y := 2344454 psi
S_ut := 105*10^3 psi
S_e := 29300*psi
d := 1.1 in
T_m := 1100 in*lbf
K_f := 1.58
T_a := 0 in*lbf
n := 1/(16/(π*d^3)*((1/S_e)*((4*(K_f*M_a)^2) + (3*(K_fs*T_a)^2))^0.5 + 1/S_ut*[4*(K_f*M_m)^2 + 3*(K_fs*T_m)^2]^0.5))
n = [1.62576]
d := (16*n/π*(1/S_e*(4*(K_f*M_a)^2 + 3*(K_fs*T_a)^2)^0.5 + 1/S_ut*(4*(K_f*M_m)^2 + 3*(K_fs*T_m)^2)^0.5))^(1/3)
# DE Gerber
A := sqrt(4*(K_f*M_a)^2 + 3*(K_fs*T_a)^2)
B := sqrt(4*(K_f*M_m)^2 + 3*(K_fs*T_m)^2)
n := 1/(8*A/(π*d^3*S_e)*(1 + (1 + (2*B*S_e/(A*S_ut))^2)^0.5))
d := (8*n*A/(π*S_e)*(1 + (1 + (2*B*S_e/(A*S_ut))^2)^0.5))^(1/3)
# DE ASME ELLICPTIC
n := 1/(16/(π*d^3)*(4*(K_f*M_a/S_e)^2 + 3*(K_fs*T_a/S_e)^2 + 4*(K_f*M_m/S_y)^2 + 3*(K_fs*T_m/S_y)^2)^0.5)
n = [1.92311]
d := (16*n/π*(4*(K_f*M_a/S_e)^2 + 3*(K_fs*T_a/S_e)^2 + 4*(K_f*M_m/S_y)^2 + 3*(K_fs*T_m/S_y)^2)^0.5)^(1/3)
d = [0.02794] m
# DE  Soderberg
n := 1/(16/(π*d^3)*(1/S_e*(4*(K_f*M_a)^2 + 3*(K_fs*T_a)^2)^0.5 + 1/S_y*[4*(K_f*M_m)^2 + 3*(K_fs*T_m)^2]^0.5))
d := (16*n/π*(1/S_e*(4*(K_f*M_a)^2 + 3*(K_fs*T_a)^2)^0.5 + 1/S_y*(4*(K_f*M_m)^2 + 3*(K_fs*T_m)^2)^0.5))^(1/3)
